// SBML level 3 version 2

model ford20()
  // Ford et al,2020
  // "Use of Model-Based Compartmental Analysis and a Super-Child Design to Study Whole-Body Retinol Kinetics and Vitamin A Total Body Stores in Children from Lower-Income Countries" by Jen Ford and friends (2020)
  // The original model was coded in WinSAAM. There the delay compartments were modelled as a series of connected pseudo-compartments. We use the same approach here.
  // The model includes a helper parameter EXPERIMENT. Setting EXPERIMENT=1 simulates Bangladesh, EXPERIMENT=2 simulates Philippines, EXPERIMENT=3 simulates Guatemala.
  // isDescribedBy doi:10.1093/jn/nxz225
  // hasTaxon taxonomy:9606
  // hasProperty MAMO:0000046 GO:0006776 mamo:MAMO_0000045
  // biomodels.db:MODEL2312190001
  // model units - substance: umol, time: day, volume: dimensionless, area: dimensionless, length: dimensionless, extent: umol

  // Compartments:
  compartment comp = 1 dimensionless;

  // Species:
  species M_4 in comp = 0; M_4 is "M_4 [liver]";  // hasPart CHEBI:50211
  species M_5 in comp = 0; M_5 is "M_5 [serum]";  // hasPart CHEBI:50211
  species M_6 in comp = 0; M_6 is "M_6 [large extravascular]";  // hasPart CHEBI:50211
  species M_7 in comp = 0; M_7 is "M_7 [small extravascular]";  // hasPart CHEBI:50211
  species M_4_0 in comp = 0; M_4_0 is "M_4^* [liver tracer]";  // hasPart CHEBI:50211
  species M_5_0 in comp = 0; M_5_0 is "M_5^* [serum tracer]";  // hasPart CHEBI:50211
  species M_6_0 in comp = 0; M_6_0 is "M_6^* [large extravascular tracer]";  // hasPart CHEBI:50211
  species M_7_0 in comp = 0; M_7_0 is "M_7^* [small extravascular tracer]";  // hasPart CHEBI:50211
  species M_3_1 in comp = 0; M_3_1 is "M_3,1 [gut]";  // hasPart CHEBI:50211
  species M_3_2 in comp = 0; M_3_2 is "M_3,2 [gut]";  // hasPart CHEBI:50211
  species M_3_3 in comp = 0; M_3_3 is "M_3,3 [gut]";  // hasPart CHEBI:50211
  species M_3_4 in comp = 0; M_3_4 is "M_3,4 [gut]";  // hasPart CHEBI:50211
  species M_3_5 in comp = 0; M_3_5 is "M_3,5 [gut]";  // hasPart CHEBI:50211
  species M_3_6 in comp = 0; M_3_6 is "M_3,6 [gut]";  // hasPart CHEBI:50211
  species M_3_7 in comp = 0; M_3_7 is "M_3,7 [gut]";  // hasPart CHEBI:50211
  species M_3_8 in comp = 0; M_3_8 is "M_3,8 [gut]";  // hasPart CHEBI:50211
  species M_3_1_0 in comp = 1/comp; M_3_1_0 is "M_3,1^* [gut tracer]";  // hasPart CHEBI:50211
  species M_3_2_0 in comp = 0; M_3_2_0 is "M_3,2^* [gut tracer]";  // hasPart CHEBI:50211
  species M_3_3_0 in comp = 0; M_3_3_0 is "M_3,3^* [gut tracer]";  // hasPart CHEBI:50211
  species M_3_4_0 in comp = 0; M_3_4_0 is "M_3,4^* [gut tracer]";  // hasPart CHEBI:50211
  species M_3_5_0 in comp = 0; M_3_5_0 is "M_3,5^* [gut tracer]";  // hasPart CHEBI:50211
  species M_3_6_0 in comp = 0; M_3_6_0 is "M_3,6^* [gut tracer]";  // hasPart CHEBI:50211
  species M_3_7_0 in comp = 0; M_3_7_0 is "M_3,7^* [gut tracer]";  // hasPart CHEBI:50211
  species M_3_8_0 in comp = 0; M_3_8_0 is "M_3,8^* [gut tracer]";  // hasPart CHEBI:50211
  species M_8_1 in comp = 0; M_8_1 is "M_8,1 [irreversible extravascular]";  // hasPart CHEBI:50211
  species M_8_2 in comp = 0; M_8_2 is "M_8,2 [irreversible extravascular]";  // hasPart CHEBI:50211
  species M_8_3 in comp = 0; M_8_3 is "M_8,3 [irreversible extravascular]";  // hasPart CHEBI:50211
  species M_8_4 in comp = 0; M_8_4 is "M_8,4 [irreversible extravascular]";  // hasPart CHEBI:50211
  species M_8_5 in comp = 0; M_8_5 is "M_8,5 [irreversible extravascular]";  // hasPart CHEBI:50211
  species M_8_6 in comp = 0; M_8_6 is "M_8,6 [irreversible extravascular]";  // hasPart CHEBI:50211
  species M_8_7 in comp = 0; M_8_7 is "M_8,7 [irreversible extravascular]";  // hasPart CHEBI:50211
  species M_8_8 in comp = 0; M_8_8 is "M_8,8 [irreversible extravascular]";  // hasPart CHEBI:50211
  species M_8_1_0 in comp = 0; M_8_1_0 is "M_8,1^* [irreversible extravascular tracer]";  // hasPart CHEBI:50211
  species M_8_2_0 in comp = 0; M_8_2_0 is "M_8,2^* [irreversible extravascular tracer]";  // hasPart CHEBI:50211
  species M_8_3_0 in comp = 0; M_8_3_0 is "M_8,3^* [irreversible extravascular tracer]";  // hasPart CHEBI:50211
  species M_8_4_0 in comp = 0; M_8_4_0 is "M_8,4^* [irreversible extravascular tracer]";  // hasPart CHEBI:50211
  species M_8_5_0 in comp = 0; M_8_5_0 is "M_8,5^* [irreversible extravascular tracer]";  // hasPart CHEBI:50211
  species M_8_6_0 in comp = 0; M_8_6_0 is "M_8,6^* [irreversible extravascular tracer]";  // hasPart CHEBI:50211
  species M_8_7_0 in comp = 0; M_8_7_0 is "M_8,7^* [irreversible extravascular tracer]";  // hasPart CHEBI:50211
  species M_8_8_0 in comp = 0; M_8_8_0 is "M_8,8^* [irreversible extravascular tracer]";  // hasPart CHEBI:50211

  // Parameters:
  EXPERIMENT = 1 dimensionless;
  U_3 = piecewise(1.219523 umol_per_day, EXPERIMENT == 1, 2.561592 umol_per_day, EXPERIMENT == 2, 2.833704 umol_per_day, EXPERIMENT == 3); U_3 has umol_per_day;
  L_4_3 = 0.8 per_day;
  W_3 = 0.2 per_day;
  L_5_4 = piecewise(2.152658 per_day, EXPERIMENT == 1, 1.223622 per_day, EXPERIMENT == 2, 1.223622 per_day, EXPERIMENT == 3); L_5_4 has per_day;
  L_7_5 = piecewise(13.92411 per_day, EXPERIMENT == 1, 3.07189 per_day, EXPERIMENT == 2, 3.07189 per_day, EXPERIMENT == 3); L_7_5 has per_day;
  L_5_7 = piecewise(1.593562 per_day, EXPERIMENT == 1, 0.3405374 per_day, EXPERIMENT == 2, 0.3405374 per_day, EXPERIMENT == 3); L_5_7 has per_day;
  L_6_5 = 12.31655 per_day;
  L_5_6 = piecewise(0.02168768 per_day, EXPERIMENT == 1, 0.00883558 per_day, EXPERIMENT == 2, 0.00883558 per_day, EXPERIMENT == 3); L_5_6 has per_day;
  W_6 = piecewise(0.002462724 per_day, EXPERIMENT == 1, 0.001939394 per_day, EXPERIMENT == 2, 0.0010771 per_day, EXPERIMENT == 3); W_6 has per_day;
  L_8_5 = piecewise(1.298 per_day, EXPERIMENT == 1, 2.214 per_day, EXPERIMENT == 2, 1.335 per_day, EXPERIMENT == 3); L_8_5 has per_day;
  W_8 = 1 per_day;
  t_3 = 1/(L_4_3 + W_3); t_3 has day;
  t_4 = 1/L_5_4; t_4 has day;
  t_5 = 1/(L_7_5 + L_6_5 + L_8_5); t_5 has day;
  t_6 = 1/(L_5_6 + W_6); t_6 has day;
  t_7 = 1/L_5_7; t_7 has day;
  t_8 = 1/W_8; t_8 has day;
  T_3 has day;
  T_4 has day;
  T_5 has day;
  T_6 has day;
  T_7 has day;
  T_8 has day;
  T has day;
  tau_3 = 0.2057179 day;
  tau_8 = 0.052 day;

  // Assignment rules:
  T_3 := tau_3;
  T_4 := M_4/U_3;
  T_5 := M_5/U_3;
  T_6 := M_6/U_3;
  T_7 := M_7/U_3;
  T_8 := tau_8;
  T := T_3 + T_4 + T_5 + T_6 + T_7 + T_8;

  // Reactions:
  u_3: => M_3_1; U_3;
  l_4_3: M_3_8 => M_4; L_4_3*M_3_8;
  w_3: M_3_8 => ; W_3*M_3_8;
  l_5_4: M_4 => M_5; L_5_4*M_4;
  l_7_5: M_5 => M_7; L_7_5*M_5;
  l_5_7: M_7 => M_5; L_5_7*M_7;
  l_6_5: M_5 => M_6; L_6_5*M_5;
  l_5_6: M_6 => M_5; L_5_6*M_6;
  w_6: M_6 => ; W_6*M_6;
  l_8_5: M_5 => M_8_1; L_8_5*M_5;
  w_8: M_8_8 => ; W_8*M_8_8;
  l_4_3_0: M_3_8_0 => M_4_0; L_4_3*M_3_8_0;
  w_3_0: M_3_8_0 => ; W_3*M_3_8_0;
  l_5_4_0: M_4_0 => M_5_0; L_5_4*M_4_0;
  l_7_5_0: M_5_0 => M_7_0; L_7_5*M_5_0;
  l_5_7_0: M_7_0 => M_5_0; L_5_7*M_7_0;
  l_6_5_0: M_5_0 => M_6_0; L_6_5*M_5_0;
  l_5_6_0: M_6_0 => M_5_0; L_5_6*M_6_0;
  w_6_0: M_6_0 => ; W_6*M_6_0;
  l_8_5_0: M_5_0 => M_8_1_0; L_8_5*M_5_0;
  w_8_0: M_8_8_0 => ; W_8*M_8_8_0;
  D_3_1: M_3_1 => M_3_2; 8/tau_3*M_3_1;
  D_3_2: M_3_2 => M_3_3; 8/tau_3*M_3_2;
  D_3_3: M_3_3 => M_3_4; 8/tau_3*M_3_3;
  D_3_4: M_3_4 => M_3_5; 8/tau_3*M_3_4;
  D_3_5: M_3_5 => M_3_6; 8/tau_3*M_3_5;
  D_3_6: M_3_6 => M_3_7; 8/tau_3*M_3_6;
  D_3_7: M_3_7 => M_3_8; 8/tau_3*M_3_7;
  D_3_1_0: M_3_1_0 => M_3_2_0; 8/tau_3*M_3_1_0;
  D_3_2_0: M_3_2_0 => M_3_3_0; 8/tau_3*M_3_2_0;
  D_3_3_0: M_3_3_0 => M_3_4_0; 8/tau_3*M_3_3_0;
  D_3_4_0: M_3_4_0 => M_3_5_0; 8/tau_3*M_3_4_0;
  D_3_5_0: M_3_5_0 => M_3_6_0; 8/tau_3*M_3_5_0;
  D_3_6_0: M_3_6_0 => M_3_7_0; 8/tau_3*M_3_6_0;
  D_3_7_0: M_3_7_0 => M_3_8_0; 8/tau_3*M_3_7_0;
  D_8_1: M_8_1 => M_8_2; 8/tau_8*M_8_1;
  D_8_2: M_8_2 => M_8_3; 8/tau_8*M_8_2;
  D_8_3: M_8_3 => M_8_4; 8/tau_8*M_8_3;
  D_8_4: M_8_4 => M_8_5; 8/tau_8*M_8_4;
  D_8_5: M_8_5 => M_8_6; 8/tau_8*M_8_5;
  D_8_6: M_8_6 => M_8_7; 8/tau_8*M_8_6;
  D_8_7: M_8_7 => M_8_8; 8/tau_8*M_8_7;
  D_8_1_0: M_8_1_0 => M_8_2_0; 8/tau_8*M_8_1_0;
  D_8_2_0: M_8_2_0 => M_8_3_0; 8/tau_8*M_8_2_0;
  D_8_3_0: M_8_3_0 => M_8_4_0; 8/tau_8*M_8_3_0;
  D_8_4_0: M_8_4_0 => M_8_5_0; 8/tau_8*M_8_4_0;
  D_8_5_0: M_8_5_0 => M_8_6_0; 8/tau_8*M_8_5_0;
  D_8_6_0: M_8_6_0 => M_8_7_0; 8/tau_8*M_8_6_0;
  D_8_7_0: M_8_7_0 => M_8_8_0; 8/tau_8*M_8_7_0;

  // Unit definitions:
  unit day = 86400 second;
  unit umol = 1e-6 mole;
  unit per_day = 1 / (86400 second);
  unit umol_per_day = 1e-6 mole / (86400 second);
end
