// SBML level 3 version 2

model furr05()
  // Furr et al, 2005
  // "Stable isotope dilution techniques for assessing vitamin A status and bioefficacy of provitamin A carotenoids in humans" by Harold and his Furry friends (2005)
  // The original model was coded in WinSAAM. There the delay compartment was modelled as a series of connected pseudo-compartments. We use the same approach here.
  // isDescribedBy doi:10.1079/PHN2004715
  // hasTaxon taxonomy:9606
  // hasProperty mamo:MAMO_0000045
  // biomodels.db:MODEL2405200001
  // model units - substance: umol, time: day, volume: dimensionless, area: dimensionless, length: dimensionless, extent: umol

  // Compartments:
  compartment comp = 1 dimensionless;

  // Species:
  species M_1 in comp = 0.751269; M_1 is "M_1 [mouth]";  // hasPart CHEBI:50211
  species M_2 in comp = 0.5416722; M_2 is "M_2 [gut]";  // hasPart CHEBI:50211
  species M_4 in comp = 3.731098; M_4 is "M_4 [liver]";  // hasPart CHEBI:50211
  species M_5 in comp = 3.17239151; M_5 is "M_5 [blood]";  // hasPart CHEBI:50211
  species M_6 in comp = 231.4108; M_6 is "M_6 [liver]";  // hasPart CHEBI:50211
  species M_7 in comp = 14.83196; M_7 is "M_7 [other]";  // hasPart CHEBI:50211
  species M_1_0 in comp = 1/comp; M_1_0 is "M_1^* [mouth tracer]";  // hasPart CHEBI:50211
  species M_2_0 in comp = 0; M_2_0 is "M_2^* [gut tracer]";  // hasPart CHEBI:50211
  species M_4_0 in comp = 0; M_4_0 is "M_4^* [liver tracer]";  // hasPart CHEBI:50211
  species M_5_0 in comp = 0; M_5_0 is "M_5^* [blood tracer]";  // hasPart CHEBI:50211
  species M_6_0 in comp = 0; M_6_0 is "M_6^* [liver tracer]";  // hasPart CHEBI:50211
  species M_7_0 in comp = 0; M_7_0 is "M_7^* [other tracer]";  // hasPart CHEBI:50211
  species M_3_1 in comp = 0.1411677; M_3_1 is "M_3,1 [delay]";  // hasPart CHEBI:50211
  species M_3_2 in comp = 0.1411677; M_3_2 is "M_3,2 [delay]";  // hasPart CHEBI:50211
  species M_3_3 in comp = 0.1411677; M_3_3 is "M_3,3 [delay]";  // hasPart CHEBI:50211
  species M_3_4 in comp = 0.1411677; M_3_4 is "M_3,4 [delay]";  // hasPart CHEBI:50211
  species M_3_5 in comp = 0.1411677; M_3_5 is "M_3,5 [delay]";  // hasPart CHEBI:50211
  species M_3_6 in comp = 0.1411677; M_3_6 is "M_3,6 [delay]";  // hasPart CHEBI:50211
  species M_3_7 in comp = 0.1411677; M_3_7 is "M_3,7 [delay]";  // hasPart CHEBI:50211
  species M_3_8 in comp = 5.335471; M_3_8 is "M_3,8 [delay]";  // hasPart CHEBI:50211
  species M_3_1_0 in comp = 0; M_3_1_0 is "M_3,1^* [delay tracer]";  // hasPart CHEBI:50211
  species M_3_2_0 in comp = 0; M_3_2_0 is "M_3,2^* [delay tracer]";  // hasPart CHEBI:50211
  species M_3_3_0 in comp = 0; M_3_3_0 is "M_3,3^* [delay tracer]";  // hasPart CHEBI:50211
  species M_3_4_0 in comp = 0; M_3_4_0 is "M_3,4^* [delay tracer]";  // hasPart CHEBI:50211
  species M_3_5_0 in comp = 0; M_3_5_0 is "M_3,5^* [delay tracer]";  // hasPart CHEBI:50211
  species M_3_6_0 in comp = 0; M_3_6_0 is "M_3,6^* [delay tracer]";  // hasPart CHEBI:50211
  species M_3_7_0 in comp = 0; M_3_7_0 is "M_3,7^* [delay tracer]";  // hasPart CHEBI:50211
  species M_3_8_0 in comp = 0; M_3_8_0 is "M_3,8^* [delay tracer]";  // hasPart CHEBI:50211

  // Parameters:
  U_1 = 7.4 umol_per_day;
  L_2_1 = 9.85 per_day;
  W_2 = 3.75 per_day;
  L_3_2 = 9.85 per_day;
  L_4_3 = 1 per_day;
  L_5_2 = 0.0614 per_day;
  L_5_4 = 1.43 per_day;
  L_6_5 = 4.26 per_day;
  L_5_6 = 0.0352 per_day;
  W_6 = 0.0232 per_day;
  L_7_5 = 4.32 per_day;
  L_5_7 = 0.924 per_day;
  t_1 = 1/L_2_1; t_1 has day;
  t_2 = 1/(W_2 + L_3_2 + L_5_2); t_2 has day;
  t_3 = 1/L_4_3; t_3 has day;
  t_4 = 1/L_5_4; t_4 has day;
  t_5 = 1/(L_6_5 + L_7_5); t_5 has day;
  t_6 = 1/(L_5_6 + W_6); t_6 has day;
  t_7 = 1/L_5_7; t_7 has day;
  T_1 has day;
  T_2 has day;
  T_3 has day;
  T_4 has day;
  T_5 has day;
  T_6 has day;
  T_7 has day;
  T has day;
  tau_3 = 0.2116667 day;
  TBS has umol;
  Fa has umol;
  SAp has dimensionless;
  SAs has dimensionless;
  S has dimensionless;
  FaS has umol;

  // Assignment rules:
  T_1 := M_1/U_1;
  T_2 := M_2/U_1;
  T_3 := tau_3;
  T_4 := M_4/U_1;
  T_5 := M_5/U_1;
  T_6 := M_6/U_1;
  T_7 := M_7/U_1;
  T := T_1 + T_2 + T_3 + T_4 + T_5 + T_6 + T_7;
  TBS := M_6 + M_7;
  Fa := M_6_0 + M_7_0;
  SAp := M_5_0/M_5;
  SAs := (M_6_0 + M_7_0)/(M_6 + M_7);
  S := piecewise(SAp/SAs, SAs > 0, 0);
  FaS := Fa*S;

  // Reactions:
  u_1: => M_1; U_1;
  l_2_1: M_1 => M_2; L_2_1*M_1;
  w_2: M_2 => ; W_2*M_2;
  l_3_2: M_2 => M_3_1; L_3_2*M_2;
  l_4_3: M_3_8 => M_4; L_4_3*M_3_8;
  l_5_2: M_2 => M_5; L_5_2*M_2;
  l_5_4: M_4 => M_5; L_5_4*M_4;
  l_6_5: M_5 => M_6; L_6_5*M_5;
  l_5_6: M_6 => M_5; L_5_6*M_6;
  w_6: M_6 => ; W_6*M_6;
  l_7_5: M_5 => M_7; L_7_5*M_5;
  l_5_7: M_7 => M_5; L_5_7*M_7;
  l_2_1_0: M_1_0 => M_2_0; L_2_1*M_1_0;
  w_2_0: M_2_0 => ; W_2*M_2_0;
  l_3_2_0: M_2_0 => M_3_1_0; L_3_2*M_2_0;
  l_4_3_0: M_3_8_0 => M_4_0; L_4_3*M_3_8_0;
  l_5_2_0: M_2_0 => M_5_0; L_5_2*M_2_0;
  l_5_4_0: M_4_0 => M_5_0; L_5_4*M_4_0;
  l_6_5_0: M_5_0 => M_6_0; L_6_5*M_5_0;
  l_5_6_0: M_6_0 => M_5_0; L_5_6*M_6_0;
  w_6_0: M_6_0 => ; W_6*M_6_0;
  l_7_5_0: M_5_0 => M_7_0; L_7_5*M_5_0;
  l_5_7_0: M_7_0 => M_5_0; L_5_7*M_7_0;
  D_3_1: M_3_1 => M_3_2; 8/tau_3*M_3_1;
  D_3_2: M_3_2 => M_3_3; 8/tau_3*M_3_2;
  D_3_3: M_3_3 => M_3_4; 8/tau_3*M_3_3;
  D_3_4: M_3_4 => M_3_5; 8/tau_3*M_3_4;
  D_3_5: M_3_5 => M_3_6; 8/tau_3*M_3_5;
  D_3_6: M_3_6 => M_3_7; 8/tau_3*M_3_6;
  D_3_7: M_3_7 => M_3_8; 8/tau_3*M_3_7;
  D_3_1_0: M_3_1_0 => M_3_2_0; 8/tau_3*M_3_1_0;
  D_3_2_0: M_3_2_0 => M_3_3_0; 8/tau_3*M_3_2_0;
  D_3_3_0: M_3_3_0 => M_3_4_0; 8/tau_3*M_3_3_0;
  D_3_4_0: M_3_4_0 => M_3_5_0; 8/tau_3*M_3_4_0;
  D_3_5_0: M_3_5_0 => M_3_6_0; 8/tau_3*M_3_5_0;
  D_3_6_0: M_3_6_0 => M_3_7_0; 8/tau_3*M_3_6_0;
  D_3_7_0: M_3_7_0 => M_3_8_0; 8/tau_3*M_3_7_0;

  // Unit definitions:
  unit day = 86400 second;
  unit umol = 1e-6 mole;
  unit per_day = 1 / (86400 second);
  unit umol_per_day = 1e-6 mole / (86400 second);
end
